*HEADING
Two-node geometrically nonlinear truss, independent geometric-reaction oracle
*NODE
1,0.,0.,0.
2,100.,0.,0.
*ELEMENT,TYPE=T3D2,ELSET=BAR
1,1,2
*MATERIAL,NAME=ELASTIC
*ELASTIC
210000.,0.3
*SOLID SECTION,ELSET=BAR,MATERIAL=ELASTIC
1.
*NSET,NSET=BASE
1
*NSET,NSET=TIP
2
*BOUNDARY
BASE,1,3,0.
TIP,1,1,0.
TIP,3,3,0.
*STEP,NLGEOM
*STATIC
0.1,1.,0.00001,0.1
*BOUNDARY
TIP,2,2,30.
*NODE PRINT,NSET=TIP
U,RF
*NODE PRINT,NSET=BASE
RF
*END STEP
